ORIGIN := 1
nWorkdays := 22
workdayTime := 8
month_for_work := 3
nWorkdaysInYear := nWorkdays*12 = 264
worktime_in_month := workdayTime*nWorkdays = 176
total_hours_for_work := month_for_work*worktime_in_month = 528
salary_in_month := 420
# Расчёт затрат на разработку ПО
T_hour := salary_in_month/worktime_in_month = 2.38636
total_team_main_salary := T_hour*total_hours_for_work = 1260
prime_total_team_main_salary_coef := 1.5
total_team_main_salary_with_prime := total_team_main_salary*prime_total_team_main_salary_coef = 1890
# норматив доп зп (10-20 %) = 20 %
additional_salary_norm := 20
additional_salary := total_team_main_salary_with_prime*additional_salary_norm/100 = 378
# ФСЗН (34 %) + Страховка (0.6 %) = 34.6
social_defence_norm := 34.6
salary_social := (additional_salary + total_team_main_salary_with_prime)*social_defence_norm/100 = 784.728
# норматив прочих затрат (100 – 150%)
salary_other_coef := 100
salary_other := total_team_main_salary_with_prime*salary_other_coef/100 = 1890
total_project_development_expenses := total_team_main_salary_with_prime + additional_salary + salary_social + salary_other = 4942.73
# Оценка эффекта от продажи ПО
# запланированный уровень рентабельности (10-50%).
profitability := 33
N_soft_licenses := 100
# общие затраты с учётом затрат на реализацию ПО (берётся 5-10%)
implementation_costs := 1.1
# прибыль, получаемая организацией-разработчиком от реализации единицы данного ПО
organization_sales_profit := total_project_development_expenses*profitability*implementation_costs/(100*N_soft_licenses) = 17.9421
# суммарная прибыль, получаемая организацией-разработчиком от реализации всех копий данного ПО
# (Суммарная годовая прибыль по проекту в целом)
Organization_year_profit := organization_sales_profit*N_soft_licenses = 1794.21
VAT := 0.2
one_soft_license := total_project_development_expenses*implementation_costs/N_soft_licenses + organization_sales_profit + VAT*total_project_development_expenses*implementation_costs = 1159.71
# ставка налога на прибыль | ставка налога на недвижимость
profit_tax_rate := 18
property_tax_rate := 1
# Чистая прибыль
clear_profit := Organization_year_profit - Organization_year_profit*(profit_tax_rate + property_tax_rate)/100 = 1453.31
# Расчёт показателей эффективности инвестиций в разработку ПО
# норма дисконта
discount_rate := 0.17
α_1 := 1/(1 + discount_rate)^(1 - 1) = 1
α_2 := 1/(1 + discount_rate)^(2 - 1) = 0.854701
α_3 := 1/(1 + discount_rate)^(3 - 1) = 0.730514
α_4 := 1/(1 + discount_rate)^(4 - 1) = 0.624371
α_5 := 1/(1 + discount_rate)^(5 - 1) = 0.53365
# Чистый дисконтированный доход
# результат (экономический эффект) МИНУС затраты (инвестиции в разработку ПО)
economical_effect_minus_dev_expenses := clear_profit - total_project_development_expenses = -3489.42
clear_discount_profit_ := economical_effect_minus_dev_expenses*α_1 + clear_profit*α_2 + clear_profit*α_3 + clear_profit*α_4 = -278.205
clear_profit*α_2 = 1242.15
economical_effect_minus_dev_expenses*α_1 = -3489.42
clear_profit*α_3 = 1061.66
clear_profit*α_4 = 907.404
cdp1 := economical_effect_minus_dev_expenses
cdp2 := economical_effect_minus_dev_expenses + clear_profit*α_2 = -2247.27
cdp3 := economical_effect_minus_dev_expenses + clear_profit*α_2 + clear_profit*α_3 = -1185.61
cdp4 := economical_effect_minus_dev_expenses + clear_profit*α_2 + clear_profit*α_3 + clear_profit*α_4 = -278.205
# Рентабельность инвестиций
(clear_profit + clear_profit*α_2 + clear_profit*α_3 + clear_profit*α_4)/total_project_development_expenses*100 = 94.3714
