# Worksheet setting: ORIGIN = 1
T_h := 600/168 = 3.57143
t := 3*168 = 504
З_о := T_h*t = 1800
З_о := З_о*1.5 = 2700
Н_д := 15
З_д := З_о*Н_д/100 = 405
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Н_соц := 34.6
З_соц := (З_о + З_д)*Н_соц/100 = 1074.33
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Н_пз := 100
З_пз := З_о*Н_пз/100 = 2700
С_п := З_о + З_д + З_соц + З_пз = 6879.33
# оценка эффективности от продаж ПО
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N := 100
У_р := 50
П_ед := С_п*У_р*1.1/(N*100) = 37.8363
П := П_ед*N = 3783.63
Ц := С_п*1.1/100 + П_ед + 0.2*С_п*1.1 = 1626.96
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Н_приб := 18
Н_недв := 1
ЧП := П - П*(Н_приб + Н_недв)/100 = 3064.74
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n := 4
α := [1; 0.85; 0.73; 0.62]
P := [ЧП; ЧП; ЧП; ЧП]
З := [С_п; 0; 0; 0]
i := 1 .. 4
ЧДД := sum(P[t]*α[t] - З[t]*α[t], t = 1 .. 1) = -3814.59
ЧДД := sum(P[t]*α[t] - З[t]*α[t], t = 1 .. 2) = -1209.56
P[i]*α[i] = [3064.74; 2605.03; 2237.26; 1900.14]
З[i]*α[i] = [6879.33; 0; 0; 0]
ЧДД := sum(P[t]*α[t] - З[t]*α[t], t = 1 .. 3) = 1027.7
3064.742 - 6879.33 = -3814.59
ЧДД := sum(P[t]*α[t] - З[t]*α[t], t = 1 .. 4) = 2927.84
Р_и := sum(P[t]*α[t], t = 1 .. n)/sum(З[t]*α[t], t = 1 .. n) = 1.4256
